// SBML level 3 version 2

model main()
  // model units - time: second, extent: mole

  // Compartments:
  compartment Cell = 1 litre;

  // Species:
  substanceOnly species E in Cell = 1*Cell; E is "Enzyme";  // substance in mole; isVersionOf uniprot:P51853 ec-code:4.1.2.38
  substanceOnly species A in Cell = 4*Cell; A is "Substrate";  // substance in mole
  substanceOnly species B in Cell = 0; B is "Product";  // substance in mole; CHEBI:17169

  // Reactions:
  Michaelis_Menten_Kinetic: A => B; kcat*E*A/(KMA + A);  // modifiers: E
    KMA = 100 mole; kcat = 100 s_1;

  // Unit definitions:
  unit s_1 = 1 / second;
end
